// COMSOL Multiphysics 5.4.0.246 model "Belletal2019-sphere-SERCAvar.mph"
// Outline of the model tree

Parameters
  DCapara = 220 [um^2/s]
  nERvar = 0.0113

Variables
  var1 "Cytosol"
    D_Ca_cyto = DCapara
    rCa_cyto = -rCaBm
    tau_Ca_cyto = 20 [ms]
    rCaBfmem = (1 [1/(uM * s)])*Ca_cyto*Bfmem - (2 [1/s])*CaBfmem
    rBfmem = -rCaBfmem
    D_Bfmem = 0 [um^2/s]
    D_CaBfmem = 0 [um^2/s]
    JCaMem = rCaBfmem
    rCaBm = (1 [1/(uM*s)])*Ca_cyto*Bm - (1[1/s])*CaBm
    Koff = (240 [nM])*(10 [1/(uM*s)])
    D_Bm = 20 [um^2/s]
    D_CaBm = 20 [um^2/s]
    rBm = -rCaBm
    BfmemIC = (78.7 [uM])*nscalePM
  var2 "ER"
    D_Ca_ER = 220 [um^2/s]
    rCa_ER = -Ca_ER/tau_Ca_ER
    tau_Ca_ER = 50 [ms]
  var7 "Extracellular Space"
    D_Ca_extra = 220 [um^2/s]
    rCa_extra = 0
  var3 "JNMDAR"
    JNMDAR = gamma_i*numNMDAR/(testScale*A_PSD)
    numNMDAR = 1
    A_PSD = 7.6350*10^-14 [m^2]
    convertToIons = (1/(2*1.602*10^-19 [C]))
    convertToMoles = (1/(6.022*10^23)) [mol]
    gamma_i = P_0*G_NMDAR*(I_f*exp(-t/tau_f)+I_s*exp(-t/tau_s))*B*(Vm-Vr)
    G_NMDAR = zeta_i*convertToIons*convertToMoles
    P_0 = 0.5
    I_f = 0.5
    tau_f = 50 [ms]
    I_s = 1-I_f
    tau_s = 200 [ms]
    Vr = 90 [mV]
    B = 1/(1+exp(-Km*Vm)*(Mg/MgScaled))
    MgScaled = 3.57 [mM]
    Km = 0.092 [1/mV]  // 0.092 [1/mV]
    Mg = 1 [mM]  // 1
    Vm = EPSP + BPAP + Vrest  // EPSP+BPAP + Vrest
    Vrest = -65 [mV]
    EPSP = (sterm/norm)*(exp(-(t-tdelay)/tep1) - exp(-(t-tdelay)/tep2))
    sterm = 25 [mV]
    norm = 1
    tdelay = 0 [ms]
    tep1 = 50 [ms]
    tep2 = 5 [ms]
    BPAP = maxBPAP*(Ibsf*exp(-(t-tdelaybp)/tbsf) + Ibss*exp(-(t-tdelaybp)/tbss))
    maxBPAP = 38 [mV]
    tdelaybp = 2 [ms]
    Ibsf = 0.75
    tbsf = 3 [ms]
    Ibss = 1 - Ibsf
    tbss = 25 [ms]
    zeta_i = (-(G_0 + n_0*h)/(1+(n_0*h/g_inf)))
    n_0 = rfactor*ExCa
    rfactor = 0.5
    G_0 = 65.6 [pS]
    h = 11.3 [pS/mM]
    g_inf = 15.2 [pS]
    D_NMDAR = 0.1 [um^2/s]
    ExCa = 2 [mM]
    testScale = 85
    G_NMDARtest = 1.204*10^-3 [mol/(s*mV)]
    testingFraction = 1/(G_0/(n_0*h))
  var4 "JPMCA and JNCX - Bonnie"
    D_PMCA = 0.1 [um^2/s]
    D_NCX = 0.1 [um^2/s]
    bi = (1 + bie + bix)^-1
    bie = Prtote*Kme/((Kme + Ca_cyto)^2)
    bix = Prtotx*Kmx/((Kmx + Ca_cyto)^2)
    Prtote = 1.91 * 10^2 [uM]
    Kme = 2.43 [uM]
    Prtotx = 8.77 [uM]
    Kmx = 1.39 * 10^-1 [uM]
    JPMCA = testScalePMCA*bi*(PMCA_2 + PMCA_5)*nscalePM
    PMCA_2 = Vmaxlr23*(Ca_cyto^2)/(Kmlr23^2 + Ca_cyto^2)
    PMCA_5 = Vmaxhr23*(Ca_cyto^5)/(Kmhr23^5 + Ca_cyto^5)
    Vmaxlr23 = 8.93*10^-2 [uM/s]
    Kmlr23 = 1.13*10^-1 [uM]
    Vmaxhr23 = 5.9*10^-1 [uM/s]
    Kmhr23 = 4.42*10^-1 [uM]
    JNCX = testScaleNCX*bi*(Vmaxr22*Ca_cyto/(Kmr22 + Ca_cyto))*nscalePM
    Vmaxr22 = 1*10^-1 [uM/s]
    Kmr22 = 1*10^0 [uM]
    A_mem = 8.0572*10^-13 [m^2]
    Vol_mem = 5.5783*10^-20 [m^3]
    nscalePMSpecific = Vol_mem/A_mem
    testScalePMCA = 100
    testScaleNCX = 1e3
    nscalePM = (0.67/6.63)[um]
  var5 "JVSCC"
    D_VSCC = 0.1 [um^2/s]
    JVSCC = testScaleVSCC*k_CaChan*VSCC*time_CaChan
    k_CaChan = (gamma*((Vm))/(Fara*convertToMoles))*(0.393 - exp(-Vm/Vmscale))/(2*(1-exp(Vm/Vmscale)))
    gamma = 3.72 [pS]
    Vmscale = 80.36 [mV]
    Fara = 96485.332 [C/mol]
    rVSCC = -rVSCCb
    rVSCCb = alpha*VSCC - beta*VSCCb
    beta = beta_4*exp(-(Vm-Vrest)/V_4)
    beta_4 = 3.68 [1/ms]
    V_4 = 26.55 [mV]
    alpha = alpha_4*exp((Vm-Vrest)/V_4)
    alpha_4 = 34.7 [1/ms]
    time_CaChan = -(exp(-t*alpha_4)-exp(-t*beta_4))
    testScaleVSCC = 1  // 1
  var6 "JSERCA"
    D_SERCA = 0.1 [um^2/s]
    JSERCA = testScaleSERCA*bi*nscaleER*Vmaxr19*Ca_cyto^2/(Ca_cyto^2 + Kpr19^2)
    Vmaxr19 = 1.14*10^2 [uM/s]
    Kpr19 = 0.2 [uM]
    testScaleSERCA = 1e3
    nscaleERSpecific = vol_ER/A_ER
    vol_ER = 2.5196*10^-21 [m^3]
    A_ER = 1.2289*10^-13 [m^2]
    nscaleER = nERvar [um]
    JLEAK = kleak*nscaleER*(Ca_ER-Ca_cyto)
    kleak = 0.1608 [1/s]

Selections
  sel1: Explicit "ER" on boundaries 7-10, 14-16, 20, 21, 23, 24, 26, 27
  sel2: Explicit "PM" on boundaries 1-6, 11-13, 17-19, 22, 25, 28-30

Geometry
  geom1 "Geometry 1" (3D, length unit m)
    sph1: Sphere | r = 237[nm]
    cyl1: Cylinder | pos = {0, 0, -550 [nm]}; r = 50 [nm]; h = 400 [nm]
    uni1: Union | input = cyl1, sph1; intbnd = off; face = all
    pare1: PartitionEdges | edge = uni1(1) edges 3, 11, 16, 17
    parf2: PartitionFaces
      face = pare1(1) boundaries 1, 2, 8, 11
      vertexsegment = pare1(1) points 2, 6, 12, 16
      extendededge = parf1 5, 18
    sph2: Sphere | r = 80[nm]
    cyl2: Cylinder | pos = {0, 0, -440 [nm]}; r = 20 [nm]; h = 450 [nm]
    uni2: Union | input = cyl2, sph2; intbnd = off; face = all
    elp3: Ellipsoid (disabled) | pos = {0, 0, 150[nm]}; semiaxes = {100[nm], 125[nm], 75[nm]}
    fin: Finalize "Form Union"

Physics
  g: GeneralFormPDE "Cytosol" on domains 1
    dependent variable u = {Ca_cyto, Bm, CaBm}
    Units.DependentVariableQuantity = concentration
    Units.SourceTermQuantity = reactionrate
    gfeq1: GeneralFormPDE (default)
      f = {rCa_cyto, rBm, rCaBm}
      Ga = 
        {-D_Ca_cyto*Ca_cytox, -D_Ca_cyto*Ca_cytoy, -D_Ca_cyto*Ca_cytoz}
        {-D_Bm*Bmx, -D_Bm*Bmy, -D_Bm*Bmz}
        {-D_CaBm*CaBmx, -D_CaBm*CaBmy, -D_CaBm*CaBmz}
      da = 1
    zflx1: ZeroFluxBoundary "Zero Flux 1" (default)
    init1: init "Initial Values 1" (default) | Ca_cyto = 0.1 [uM]; Bm = 20 [uM]; CaBf = 0 [uM]; Bf = 78.7 [uM]
    flux1: FluxBoundary "Flux/Source 1 - NMDAR" on boundaries 5, 6, 19, 25 | g = {JNMDAR, 0, 0}
    flux2: FluxBoundary "Flux/Source 2 - Pumps + VSCC" on boundaries 1-6, 11-13, 17-19, 22, 25, 28-30
      g = {JVSCC- JPMCA - JNCX - JCaMem, 0, 0}
    flux3: FluxBoundary "Flux/Source 3 - SERCA" on selection sel1 | g = {-JSERCA+JLEAK, 0, 0}
  g2: GeneralFormPDE "ER" on domains 2
    dependent variable Ca_ER
    Units.DependentVariableQuantity = concentration
    Units.SourceTermQuantity = reactionrate
    gfeq1: GeneralFormPDE (default) | f = 0; Ga = {-D_Ca_ER*Ca_ERx, -D_Ca_ER*Ca_ERy, -D_Ca_ER*Ca_ERz}; da = 1
    zflx1: ZeroFluxBoundary "Zero Flux 1" (default)
    init1: init "Initial Values 1" (default) | Ca_ER = 60 [uM]
    flux1: FluxBoundary "Flux/Source 1" on selection sel1 | g = JSERCA-JLEAK
  gb: GeneralFormBoundaryPDE "PM" on boundaries 1-6, 11-13, 17-19, 22, 25, 28-30
    dependent variable u2 = {PMCA, NCX, VSCC, Bfmem, CaBfmem}
    Units.DependentVariableQuantity = surfaceconcentration
    Units.SourceTermQuantity = molarflux
    gfeq1: GeneralFormPDE (default)
      f = {0, 0, 0, rBfmem, rCaBfmem}
      Ga = 
        {-D_PMCA*PMCATx, -D_PMCA*PMCATy, -D_PMCA*PMCATz}
        {-D_NCX*NCXTx, -D_NCX*NCXTy, -D_NCX*NCXTz}
        {-D_VSCC*VSCCTx, -D_VSCC*VSCCTy, -D_VSCC*VSCCTz}
        {-D_Bfmem*BfmemTx, -D_Bfmem*BfmemTy, -D_Bfmem*BfmemTz}
        {-D_CaBfmem*CaBfmemTx, -D_CaBfmem*CaBfmemTy, -D_CaBfmem*CaBfmemTz}
      da = {1, 0, 0, 0, 0, 0, 1, 0, 0, 0, 0, 0, 1, 0, 0, 0, 0, 0, 1, 0, 0, 0, 0, 0, 1}
    init1: init "Initial Values 1" (default)
      PMCA = (998/(6.022*10^23)) [mol/um^2]
      NCX = (142/(6.022*10^23)) [mol/um^2]
      VSCC = (2/(6.022*10^23)) [mol/um^2]
      Bfmem = BfmemIC
  gb2: GeneralFormBoundaryPDE "ER Membrane" on selection sel1
    dependent variable SERCA
    Units.DependentVariableQuantity = surfaceconcentration
    Units.SourceTermQuantity = molarflux
    gfeq1: GeneralFormPDE (default) | f = 0; Ga = {-D_SERCA*SERCATx, -D_SERCA*SERCATy, -D_SERCA*SERCATz}; da = 1
    init1: init "Initial Values 1" (default) | SERCA = (2000/(6.022*10^23)) [mol/um^2]

Mesh
  mesh1 "Mesh 1"
    size: MeshSizeDefault | hauto = 4
    bl1: BndLayer "Boundary Layers 1" on entire geometry
      blp: BndLayerProp "Boundary Layer Properties" on all boundaries | blnlayers = 4

Studies
  std1 "Study 1"
    param: Parametric "Parametric Sweep" | pname = nERvar; plistarr = 0.000113, 0.00113, 0.0113, 0.113, 1.13
    time: Transient "Time Dependent" | tlist = range(0,0.001,0.3)

Solver configurations
  sol1 "Solution 1" (study std1)
    v1: Variables "Dependent Variables 1"
    t1: Time "Time-Dependent Solver 1" | tlist = range(0,0.001,0.3)
      dDef: Direct
      se1: Segregated
        ss1: SegregatedStep | segvar = {comp1_Ca_cyto, comp1_Bm, comp1_CaBm}; linsolver = dDef
        ss2: SegregatedStep | segvar = {comp1_Ca_ER}; linsolver = dDef
        ss3: SegregatedStep
          segvar = {comp1_PMCA, comp1_NCX, comp1_VSCC, comp1_Bfmem, comp1_CaBfmem, comp1_SERCA}
          linsolver = dDef
  sol2 "Parametric Solutions 1" (study std1)
  sol4 "Parametric Solutions 2" (study std1)

Datasets
  dset1: Solution | solution = sol1
  cpt1: CutPoint3D "top vol" | data = dset1; pointx = 0; pointy = 0; pointz = 150 [nm]
  cpt2: CutPoint3D "side vol" | data = dset1; pointx = 150 [nm]; pointy = 0; pointz = 0
  cpt3: CutPoint3D "neck vol" | data = dset1; pointx = 35 [nm]; pointy = 0; pointz = -300[nm]
  dset2: Solution | solution = sol2
  cpl1: CutPlane "Cut Plane 1 - long axis" | data = dset1
  cpl2: CutPlane "Cut Plane 2 - short axis" | data = dset1; quickplane = zx
  cpt4: CutPoint3D "top membrane" | data = dset1; pointx = 0; pointy = 0; pointz = 250 [nm]; bndsnap = on
  cpt5: CutPoint3D "ER surface" | data = dset1; pointx = 0; pointy = 0; pointz = 100 [nm]; bndsnap = on
  dset3: Solution | solution = sol4

Derived values
  int1: IntSurface "Surface Integration 1" on boundaries 5, 6, 19, 25
    data = dset1
    table = tbl1
    expr = {JNMDAR, }
    unit = {mol/s, }
  int2: IntVolume "Volume Integration 2" on domains 1
    data = dset3
    table = tbl2
    expr = Ca_cyto
    unit = mol
    descr = Dependent variable Ca_cyto
  av1: AvVolume "Volume Average 1" on domains 1, 2 | data = dset1; table = tbl3; expr = Ca_cyto*1e3
  max1: MaxVolume "Volume Maximum 1" on domains 1 | data = dset3; table = tbl4; expr = Ca_cyto; unit = mol/m^3

Tables
  tbl1: Table
    // Surface Integration 1 (1, , , , , )
    Time (s) | JSERCA (mol/s) | JLEAK (mol/s) | JVSCC (mol/s) | JPMCA (mol/s) | JNCX (mol/s) | JCaMem (mol/s) | JNMDAR (mol/s)
    0 | 3.33111e-22 | 1.33793e-23 | 0 | 3.70851e-24 | 8.43824e-24 | 6.84304e-22 | 9.51831e-20
    0.001 | 2.6834e-20 | 1.36565e-23 | 5.11618e-20 | 9.5741e-22 | 1.24266e-21 | 4.73862e-20 | 7.50661e-20
    0.002 | 2.58736e-20 | 1.60313e-23 | 1.58596e-21 | 9.2581e-22 | 1.19787e-21 | 4.56791e-20 | 5.28858e-20
    0.003 | 2.34294e-20 | 1.83271e-23 | 4.59721e-23 | 8.36445e-22 | 1.07125e-21 | 4.17179e-20 | 3.78302e-20
    0.004 | 2.07029e-20 | 2.0409e-23 | 1.27557e-24 | 7.37859e-22 | 9.32111e-22 | 3.73728e-20 | 2.87723e-20
    0.005 | 1.80925e-20 | 2.2256e-23 | 3.43813e-26 | 6.44185e-22 | 8.00529e-22 | 3.31733e-20 | 2.32984e-20
    0.006 | 1.58021e-20 | 2.38909e-23 | 9.08941e-28 | 5.62281e-22 | 6.86044e-22 | 2.93916e-20 | 1.98446e-20
    0.007 | 1.38223e-20 | 2.53268e-23 | 2.37214e-29 | 4.91719e-22 | 5.87896e-22 | 2.60199e-20 | 1.75446e-20
    0.008 | 1.21436e-20 | 2.65917e-23 | 6.13786e-31 | 4.31986e-22 | 5.0521e-22 | 2.30548e-20 | 1.59232e-20
    0.009 | 1.07345e-20 | 2.77081e-23 | 1.57919e-32 | 3.81935e-22 | 4.3624e-22 | 2.04693e-20 | 1.47122e-20
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  tbl2: Table
    // Volume Integration 2 (1)
    nERvar | t (s) | Dependent variable Ca_cyto (mol)
    0.000113 | 0 | 5.63493e-24
    0.000113 | 0.001 | 4.3376e-22
    0.000113 | 0.002 | 4.50705e-22
    0.000113 | 0.003 | 4.36241e-22
    0.000113 | 0.004 | 4.12916e-22
    0.000113 | 0.005 | 3.86076e-22
    0.000113 | 0.006 | 3.5873e-22
    0.000113 | 0.007 | 3.32778e-22
    0.000113 | 0.008 | 3.08322e-22
    0.000113 | 0.009 | 2.85535e-22
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  tbl3: Table
    // Volume Average 1 (Ca_cyto*1e3)
    Time (s) | Ca_cyto*1e3 (mol/m^3)
    0 | 0.0014972
    0.001 | 5.8049
    0.002 | 6.26783
    0.003 | 6.42178
    0.004 | 6.38955
    0.005 | 6.31406
    0.006 | 6.2106
    0.007 | 6.07479
    0.008 | 5.93899
    0.009 | 5.8019
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  tbl4: Table
    // Volume Maximum 1 (Ca_cyto)
    nERvar | t (s) | Ca_cyto (mol/m^3)
    0.000113 | 0 | 0.000177627
    0.000113 | 0.001 | 0.00840692
    0.000113 | 0.002 | 0.00858414
    0.000113 | 0.003 | 0.008187
    0.000113 | 0.004 | 0.00768251
    0.000113 | 0.005 | 0.00714905
    0.000113 | 0.006 | 0.00662539
    0.000113 | 0.007 | 0.00613739
    0.000113 | 0.008 | 0.00568327
    0.000113 | 0.009 | 0.00526334
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
Plots
  pg1: PlotGroup3D "3D Plot Group 1" | data = dset1
    vol1: Volume | expr = Ca_cyto*1e3
  pg2: PlotGroup1D "1D Plot Group 2" | data = dset1
    ptgr1: PointGraph | data = cpt1; expr = Ca_cyto*1e3
    ptgr3: PointGraph | data = cpt2; expr = Ca_cyto*1e3
    ptgr2: PointGraph | data = cpt3; expr = Ca_cyto*1e3
    ptgr4: PointGraph (disabled) | data = cpt4; expr = JSERCA*A_ER
  pg3: PlotGroup3D "3D Plot Group 3" | data = dset2
    slc1: Slice | expr = Ca_cyto
  pg4: PlotGroup3D "3D Plot Group 4" | data = dset2
    slc1: Slice | expr = Ca_ER
  pg5: PlotGroup3D "3D Plot Group 5" | data = dset2
    surf1: Surface | expr = PMCA
  pg6: PlotGroup3D "3D Plot Group 6" | data = dset2
    surf1: Surface | expr = SERCA
  pg7: PlotGroup2D "2D Plot Group 7" | data = cpl1
    surf1: Surface | expr = Ca_cyto*1e3
    surf2: Surface (disabled) | data = cpl2; expr = Ca_cyto
  pg8: PlotGroup3D "3D Plot Group 8" | data = dset3
    slc1: Slice | expr = Ca_cyto
  pg9: PlotGroup3D "3D Plot Group 9" | data = dset3
    slc1: Slice | expr = Ca_ER
  pg10: PlotGroup3D "3D Plot Group 10" | data = dset3
    surf1: Surface | expr = PMCA
  pg11: PlotGroup3D "3D Plot Group 11" | data = dset3
    surf1: Surface | expr = SERCA

Exports
  plot1: Plot
    filename = /Users/miriambell/Desktop/Calcium-JGP-MajorRevisions/NEWGEOMETRIES/ToPlotNewGeo/sphere-top-t-newGeo.txt
  plot2: Plot
    filename = /Users/miriambell/Desktop/Calcium-JGP-MajorRevisions/NEWGEOMETRIES/ToPlotNewGeo/sphere-spatial-10ms-control.txt
  plot3: Plot
    filename = /Users/miriambell/Documents/COMSOL files/Bell_Calcium/FinalSimulations/MajorRevision/testing/sphere-nAvg-SERCA.txt